# DPD Fluid


variable T    equal 1.0
variable rc   equal 1.0
variable rcD  equal 1.0


units        lj
boundary     p p p
atom_style   molecular
dimension    3
newton       on
comm_modify  vel yes


# Creating simulation box
region my_box block -6.65 6.65 -10  10 -10  10
region my_box_region_solvent_1 block -6.65  2  -10  10  -10  10
region my_box_region_solvent_2 block  2.0  6.65  -10  10  -10  10


region my_box_region_pol_1 block -6.65 -4 -10 10 -10 10
region my_box_region_pol_2 block  4 6.65 -10 10 -10 10


create_box 5 my_box  bond/types 2  extra/bond/per/atom 12 extra/special/per/atom 12


# Creating the narrow regions and generating the particle such that initial particle distribution remains a delta function distribution

molecule barrier hexagonal_lattice_solid.mol
molecule pol polymer_template.mol toff 2 boff 1


create_atoms 0 single 0.0 0.0 0.0 mol barrier 4545545 rotate 0.0  1.0  0  0
create_atoms 0 random 27 87910 my_box_region_pol_1 mol pol 454336
create_atoms 0 random 27 87910 my_box_region_pol_2 mol pol 454336
create_atoms 5 random 7575 87950 my_box_region_solvent_1
create_atoms 5 random 7575 87950 my_box_region_solvent_2


bond_style harmonic
bond_coeff 1 80.0 0.5
bond_coeff 2 1000.0 1.0


mass     1 1.0
mass     2 5.0
mass     3 1.0
mass     4 1.0
mass     5 1.0


pair_style dpd ${T} ${rcD} 38542

pair_coeff   1 1 0.0  4.5  0.5
pair_coeff   1 2 1000.  4.5  0.25
pair_coeff   1 3 25.0  4.5  0.5
pair_coeff   1 4 25.0  4.5  0.5
pair_coeff   1 5 50.0  4.5  0.5
pair_coeff   2 2 5000.  4.5  0.4
pair_coeff   3 3 25.0  4.5  1.
pair_coeff   4 4 25.0  4.5  1.
pair_coeff   5 5 25.0  4.5  1.
pair_coeff   2 3 25.0  4.5  1.
pair_coeff   2 4 25.0  4.5  1.
pair_coeff   2 5 50.0  4.5  1
pair_coeff   3 4 25.0  4.5  1.
pair_coeff   3 5 25.0  4.5  1.
pair_coeff   4 5 60.0  4.5  1.


group part type 2 3 4 5

group polymer type 3


timestep     0.005
run_style    verlet


comm_modify vel yes
comm_modify cutoff 4.0


thermo_style custom step time temp press
thermo       100


velocity part create ${T} 68768932


fix integrator part nve

compute chunk_1 polymer chunk/atom bin/1d x lower 0.05 units reduced
compute myChunk1 part property/chunk chunk_1 count
fix 1 all ave/time 10 1 100 c_myChunk1 file bin_particles.lammpstrj mode vector


dump 2 all custom 500 simulation_data_task_1.lammpstrj id type x y z vx vy vz


# Production run to measure MSD
run          200000
